New Fuse.aed314fc-a59f-4d7c-a3ee-166d2bee9ab2 monitoredobj=Line.879a22ee-82c6-4480-85e9-f844c133c7ea monitoredterm=2 SwitchedObj=Line.879a22ee-82c6-4480-85e9-f844c133c7ea SwitchedTerm=2 fusecurve=Klink ratedcurrent=500
