new Recloser.d3d4a264-8fb4-476f-a89d-73fb88c29482 monitoredobj=Line.lohl650_632 monitoredterm=1 switchedobj=Line.lohl650_632 switchedterm=1 delay=0.042 numfast=1 phasefast=101 phasedelayed=133 phasetrip=200 tdphfast=1 tdphdelayed=1 shots=4 recloseintervals=(2, 2, 5)
